*Heading
** Job name: Job500_13 Model name: LambdaTest_mod3
** Generated by: Abaqus/CAE 6.14-1
*Preprint, echo=NO, model=NO, history=NO, contact=NO
**
** PARTS
**
*Part, name=PART-1
*Node
      1,           0.,           0., 0.0549999997
      2, -0.0549999997,           0.,           0.
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*Element, type=S8R
   1,    20,    21,   390,   376,  5151,  5152,  5153,  5154
   2,    21,    22,   391,   390,  5155,  5156,  5157,  5152
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*Nset, nset=PART-1-REFPT_, internal
 15447,
*Nset, nset=SET-1, generate
     1,  15446,      1
*Elset, elset=SET-1, generate
    1,  5148,     1
*Orientation, name=Ori-1, system=SPHERICAL
          0.,           0.,           0.,           0.,          -1.,           0.
2, 0.
** Section: Section-1-SET-1
*Shell Section, elset=SET-1, material=MATERIAL-1, orientation=Ori-1
*End Part
**
**
** ASSEMBLY
**
*Assembly, name=Assembly
**
*Instance, name=PART-1-1, part=PART-1
*End Instance
**
*Nset, nset=SET-4, instance=PART-1-1
 15447,
*Nset, nset=SET-5, instance=PART-1-1
 15447,
*Nset, nset=SET-6, instance=PART-1-1
     2,     3,     4,     5,    64,    65
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*Elset, elset=SET-6, instance=PART-1-1
  252,  266,  280,  294,  308,  322
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*Nset, nset=SET-7, instance=PART-1-1
 15447,
*Nset, nset=SET-8, instance=PART-1-1
     2,     4,     5,   149,   150,   151
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*Elset, elset=SET-8, instance=PART-1-1
  925,  938,  951,  964,  977,  990
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*Nset, nset=_PickedSet14, internal, instance=PART-1-1
 15447,
*Elset, elset=_SURF-4_SNEG, internal, instance=PART-1-1, generate
    1,  5148,     1
*Elset, elset=_SURF-5_SNEG, internal, instance=PART-1-1, generate
    1,  5148,     1
*Surface, type=ELEMENT, name=SURF-4
_SURF-4_SNEG, SNEG
*Surface, type=ELEMENT, name=SURF-5
_SURF-5_SNEG, SNEG
*End Assembly
**
** MATERIALS
**
*Material, name=MATERIAL-1
*Damping, alpha=1000., beta=0.001
*Density
1500.,
*Elastic, type=ENGINEERING CONSTANTS, dependencies=1
*User Defined Field
*Depvar
1
*
** INTERACTION PROPERTIES
**
*Fluid Behavior, name=INTPROP-1
*Fluid Density
1000
*Fluid Expansion
 -0.001,
*Fluid Bulk Modulus
 2.5e+09,
*Surface Interaction, name=INTPROP-2
1.,
*Friction, slip tolerance=0.005
0.,
*Surface Behavior, pressure-overclosure=HARD
**
** BOUNDARY CONDITIONS
**
** Name: Temp-BC-1 Type: Temperature
*Boundary
SET-6, 11, 11
**
** INTERACTIONS
**
** Interaction: INTPROP-2-1
*Contact Pair, interaction=INTPROP-2, type=SURFACE TO SURFACE
SURF-5,
** Interaction: INT-1
*Fluid Cavity, name=INT-1, behavior=INTPROP-1, refnode=_PickedSet14, surface=SURF-4

** ----------------------------------------------------------------
**
** STEP: Step-2
**
*Step, name=Step-2, nlgeom=YES, inc=1000
*Dynamic,application=QUASI-STATIC,initial=NO
1e-03,0.4,1e-07
**
** PREDEFINED FIELDS
**
** Name: Field-1   Type: Temperature
*Temperature
SET-7, 300.
** Name: iField-2   Type: Temperature
*Temperature
SET-8, 300.
**
** OUTPUT REQUESTS
**
*Restart, write, frequency=0
**
** FIELD OUTPUT: F-Output-3
**
*Output, field, frequency=2
*Contact Output
CDISP, CSTRESS
**
** FIELD OUTPUT: F-Output-1
**
*Node Output
CF, NT, RF, U
**
** FIELD OUTPUT: F-Output-2
**
*Element Output, directions=YES
LE, P, PE, PEEQ, PEMAG, S, TEMP
**
** HISTORY OUTPUT: H-Output-1
**
*Output, history, variable=PRESELECT, frequency=2
*End Step
